# OpenSim document version 40600
Model HYOID_Scaled:
  gravity: 0 -9.80665 0
  length_units: meters
  force_units: N
  credits:
    Jonathan Mortensen, University of Utah, Department of Mechanical Engineering
  publications:
    The inclusion of hyoid muscles improve moment generating capacity and dynamic simulations in musculoskeletal models of the head and neck, PLOS ONE, 2018
  Ground
  BodySet:
    Body spine: mass=70 [kg] mass_center=(0 0 0) inertia=(1 1 1 0 0 0) meshes=tlspine.vtp
    Body rscapula: mass=1 mass_center=(0 0 0) inertia=(1 1 0.5 0 0 0) meshes=rscapula.vtp
    Body rclavicle: mass=1 mass_center=(0 0 0) inertia=(1 1 0.5 0 0 0) meshes=rclavicle.vtp
    Body lscapula: mass=1 mass_center=(0 0 0) inertia=(1 1 0.5 0 0 0) meshes=lscapula.vtp
    Body lclavicle: mass=1 mass_center=(0 0 0) inertia=(1 1 0.5 0 0 0) meshes=lclavicle.vtp
    Body ribcage: mass=1 mass_center=(0 0 0) inertia=(1 1 0.75 0 0 0) meshes=ribcage.vtp
    Body cerv7: mass=0.5840847 mass_center=(-0.0002 0.0071 0) inertia=(0.02 0.08 0.02 0 0 0) meshes=rotatedcerv7.vtp
    Body cerv6: mass=0.5077489 mass_center=(0.0002 0.0064 0) inertia=(0.02 0.08 0.02 0 0 0) meshes=cerv6.vtp
    Body cerv5: mass=0.4291 mass_center=(0.0001 0.0063 0) inertia=(0.02 0.08 0.02 0 0 0) meshes=cerv5.vtp
    Body cerv4: mass=0.4233168 mass_center=(-0.0003 0.0067 0) inertia=(0.02 0.08 0.02 0 0 0) meshes=cerv4.vtp
    Body cerv3: mass=0.419847 mass_center=(-0.0008 0.0071 0) inertia=(0.02 0.08 0.02 0 0 0) meshes=cerv3.vtp
    Body cerv2: mass=0.5875545 mass_center=(-0.001 0.0059 0) inertia=(0.02 0.08 0.02 0 0 0) meshes=cerv2.vtp
    Body cerv1: mass=0.4672677 mass_center=(0.0312 0.0019 0) inertia=(0.02 0.08 0.02 0 0 0) meshes=cerv1.vtp
    Body skull: mass=4.3 mass_center=(0.0173 0.063 0) inertia=(0.02073 0.015 0.022605 0 0 0) meshes=skull.vtp
      PhysicalOffsetFrame Right_Anterior_Canal_frame: socket_parent=.. translation=(0.01 0.035 0.045) [meters]
        Arrow Right_Anterior_Canal: direction=(-0.589 -0.177 0.788) length=0.04
      PhysicalOffsetFrame Right_Posterior_Canal_frame: socket_parent=.. translation=(0.01 0.035 0.045)
        Arrow Right_Posterior_Canal: direction=(-0.694 -0.27 -0.667) length=0.04
      PhysicalOffsetFrame Right_Horizontal_Canal_frame: socket_parent=.. translation=(0.01 0.035 0.045)
        Arrow Right_Horizontal_Canal: direction=(-0.323 0.946 -0.038) length=0.04
      PhysicalOffsetFrame Left_Anterior_Canal_frame: socket_parent=.. translation=(0.01 0.035 -0.045)
        Arrow Left_Anterior_Canal: direction=(-0.589 -0.177 -0.788) length=0.04
      PhysicalOffsetFrame Left_Posterior_Canal_frame: socket_parent=.. translation=(0.01 0.035 -0.045)
        Arrow Left_Posterior_Canal: direction=(-0.694 -0.27 0.667) length=0.04
      PhysicalOffsetFrame Left_Horizontal_Canal_frame: socket_parent=.. translation=(0.01 0.035 -0.045)
        Arrow Left_Horizontal_Canal: direction=(-0.323 0.946 0.038) length=0.04
      PhysicalOffsetFrame Right_Anterior_VisualFrame: socket_parent=.. translation=(-0.00178 0.03146 0.06076)
          orientation=(1.269332 0.5994975 0.7948427) [radians]
        Cylinder Right_Anterior_Cyl: radius=0.002 half_height=0.02
      PhysicalOffsetFrame Right_Posterior_VisualFrame: socket_parent=.. translation=(-0.00388 0.0296 0.03166)
          orientation=(-1.041508 -0.687176 1.115447)
        Cylinder Right_Posterior_Cyl: radius=0.002 half_height=0.02
      PhysicalOffsetFrame Right_Horizontal_VisualFrame: socket_parent=.. translation=(0.00354 0.05392 0.04424)
          orientation=(-0.03800318 -0.006306222 0.3288441)
        Cylinder Right_Horizontal_Cyl: radius=0.002 half_height=0.02
      PhysicalOffsetFrame Left_Anterior_VisualFrame: socket_parent=.. translation=(-0.00178 0.03146 -0.06076)
          orientation=(-1.269332 -0.5994975 0.7948427)
        Cylinder Left_Anterior_Cyl: radius=0.002 half_height=0.02
      PhysicalOffsetFrame Left_Posterior_VisualFrame: socket_parent=.. translation=(-0.00388 0.0296 -0.03166)
          orientation=(1.041508 0.687176 1.115447)
        Cylinder Left_Posterior_Cyl: radius=0.002 half_height=0.02
      PhysicalOffsetFrame Left_Horizontal_VisualFrame: socket_parent=.. translation=(0.00354 0.05392 -0.04424)
          orientation=(0.03800318 0.006306222 0.3288441)
        Cylinder Left_Horizontal_Cyl: radius=0.002 half_height=0.02
    Body jaw: mass=0 mass_center=(0 0.05 0) inertia=(0 0 0 0 0 0) meshes=jaw.vtp
    Body r_eye: mass=0.0075 mass_center=(0 0 0) inertia=(4.32e-7 4.32e-7 4.32e-7 0 0 0) meshes=(sclera.obj pupil.obj)
      WrapEllipsoid right_eye_wrap: xyz_body_rotation=(0.7854 0 0) translation=(0 0 0) quadrant=all
          dimensions=(0.012 0.012 0.012)
      WrapEllipsoid right_eye_wrap2: translation=(0 0 0) quadrant=all dimensions=(0.012 0.012 0.012)
    Body l_eye: mass=0.0075 mass_center=(0 0 0) inertia=(4.32e-7 4.32e-7 4.32e-7 0 0 0) meshes=(sclera.obj pupil.obj)
      WrapEllipsoid left_eye_wrap: xyz_body_rotation=(-0.7854 0 0) translation=(0 0 0) quadrant=all
          dimensions=(0.012 0.012 0.012)
      WrapEllipsoid left_eye_wrap2: translation=(0 0 0) quadrant=all dimensions=(0.012 0.012 0.012)
  JointSet:
    CustomJoint spine: socket_parent_frame=ground_offset socket_child_frame=spine_offset
      Coordinate gndpitch: default_value=7.35301e-11 range=(-3.141593 3.141593) clamped=true locked=true
      Coordinate gndroll: default_value=1.396685e-11 range=(-3.141593 3.141593) clamped=true locked=true
      Coordinate gndyaw: default_value=7.749897e-12 range=(-3.141593 3.141593) clamped=true locked=true
      Coordinate spine_tx: default_value=-3.978722e-17 range=(-1 1) clamped=true locked=true
      Coordinate spine_ty: default_value=8.445262e-17 range=(-1 1) clamped=true locked=true
      Coordinate spine_tz: default_value=-7.306666e-19 range=(-1 1) clamped=true locked=true
      PhysicalOffsetFrame ground_offset: socket_parent=/ground translation=(0 0 0)
      PhysicalOffsetFrame spine_offset: socket_parent=/bodyset/spine translation=(0 0 0)
      SpatialTransform:
        TransformAxis rotation1: coordinates=gndpitch axis=(0 0 1) LinearFunction(coefficients=1 0)
        TransformAxis rotation2: coordinates=gndroll axis=(1 0 0) LinearFunction(coefficients=1 0)
        TransformAxis rotation3: coordinates=gndyaw axis=(0 1 0) LinearFunction(coefficients=1 0)
        TransformAxis translation1: coordinates=spine_tx axis=(1 0 0) LinearFunction(coefficients=1 0)
        TransformAxis translation2: coordinates=spine_ty axis=(0 1 0) LinearFunction(coefficients=1 0)
        TransformAxis translation3: coordinates=spine_tz axis=(0 0 1) LinearFunction(coefficients=1 0)
    WeldJoint rscapulajnt: socket_parent_frame=spine_offset socket_child_frame=rscapula_offset
      PhysicalOffsetFrame spine_offset: socket_parent=/bodyset/spine translation=(-0.0366 0.3623 0.1837)
          orientation=(0.174533 -0.296706 -0.174533)
      PhysicalOffsetFrame rscapula_offset: socket_parent=/bodyset/rscapula translation=(0 0 0)
    WeldJoint rclaviclejnt: socket_parent_frame=spine_offset socket_child_frame=rclavicle_offset
      PhysicalOffsetFrame spine_offset: socket_parent=/bodyset/spine translation=(-0.0118 0.3353 0.022)
          orientation=(0 0.139626 0)
      PhysicalOffsetFrame rclavicle_offset: socket_parent=/bodyset/rclavicle translation=(0 0 0)
    WeldJoint lscapulajnt: socket_parent_frame=spine_offset socket_child_frame=lscapula_offset
      PhysicalOffsetFrame spine_offset: socket_parent=/bodyset/spine translation=(-0.0366 0.3623 -0.1837)
          orientation=(-0.174533 0.296706 -0.174533)
      PhysicalOffsetFrame lscapula_offset: socket_parent=/bodyset/lscapula translation=(0 0 0)
    WeldJoint lclaviclejnt: socket_parent_frame=spine_offset socket_child_frame=lclavicle_offset
      PhysicalOffsetFrame spine_offset: socket_parent=/bodyset/spine translation=(-0.0118 0.3353 -0.022)
          orientation=(0 -0.139626 0)
      PhysicalOffsetFrame lclavicle_offset: socket_parent=/bodyset/lclavicle translation=(0 0 0)
    WeldJoint ribcagejnt: socket_parent_frame=spine_offset socket_child_frame=ribcage_offset
      PhysicalOffsetFrame spine_offset: socket_parent=/bodyset/spine translation=(0 0 0)
      PhysicalOffsetFrame ribcage_offset: socket_parent=/bodyset/ribcage translation=(0 0 0)
    CustomJoint auxt1jnt: socket_parent_frame=spine_offset socket_child_frame=cerv7_offset
      Coordinate pitch2: default_value=1.191952e-6 range=(-0.691151 1.00531) clamped=true
      Coordinate roll2: default_value=-7.417425e-34 range=(-0.691151 0.691151) clamped=true
      Coordinate yaw2: default_value=-1.940732e-33 range=(-0.565487 0.565487) clamped=true
      PhysicalOffsetFrame spine_offset: socket_parent=/bodyset/spine translation=(-0.0475 0.3613 0)
      PhysicalOffsetFrame cerv7_offset: socket_parent=/bodyset/cerv7 translation=(0.00684 -0.005655 0)
      SpatialTransform: axes_held_at_zero=(translation1 translation2 translation3)
        TransformAxis rotation1: coordinates=pitch2 axis=(0 0 1)
          SimmSpline: x=(-1.74533 1.74533) y=(-0.172788 0.172788)
        TransformAxis rotation2: coordinates=roll2 axis=(1 0 0)
          SimmSpline: x=(-1.74533 1.74533) y=(-0.136136 0.136136)
        TransformAxis rotation3: coordinates=yaw2 axis=(0 1 0)
          SimmSpline: x=(-1.74533 1.74533) y=(-0.109956 0.109956)
    CustomJoint aux7jnt: socket_parent_frame=cerv7_offset socket_child_frame=cerv6_offset
      Coordinate aux7jnt_r3: default_value=2.228953e-7 range=(-99999.9 99999.9) clamped=false
      Coordinate aux7jnt_r1: default_value=0 range=(-99999.9 99999.9) clamped=false
      Coordinate aux7jnt_r2: default_value=0 range=(-99999.9 99999.9) clamped=false
      PhysicalOffsetFrame cerv7_offset: socket_parent=/bodyset/cerv7 translation=(0.013256 0.01238 0)
      PhysicalOffsetFrame cerv6_offset: socket_parent=/bodyset/cerv6 translation=(0.009419 -0.004065 0)
      SpatialTransform: axes_held_at_zero=(translation1 translation2 translation3)
        TransformAxis rotation1: coordinates=aux7jnt_r3 axis=(0 0 1) LinearFunction(coefficients=1 0)
        TransformAxis rotation2: coordinates=aux7jnt_r1 axis=(1 0 0) LinearFunction(coefficients=1 0)
        TransformAxis rotation3: coordinates=aux7jnt_r2 axis=(0 1 0) LinearFunction(coefficients=1 0)
    CustomJoint aux6jnt: socket_parent_frame=cerv6_offset socket_child_frame=cerv5_offset
      Coordinate aux6jnt_r3: default_value=2.622291e-7 range=(-99999.9 99999.9) clamped=false
      Coordinate aux6jnt_r1: default_value=0 range=(-99999.9 99999.9) clamped=false
      Coordinate aux6jnt_r2: default_value=0 range=(-99999.9 99999.9) clamped=false
      PhysicalOffsetFrame cerv6_offset: socket_parent=/bodyset/cerv6 translation=(0.00985 0.00975 0)
      PhysicalOffsetFrame cerv5_offset: socket_parent=/bodyset/cerv5 translation=(0.00567 -0.00815 0)
      SpatialTransform: axes_held_at_zero=(translation1 translation2 translation3)
        TransformAxis rotation1: coordinates=aux6jnt_r3 axis=(0 0 1) LinearFunction(coefficients=1 0)
        TransformAxis rotation2: coordinates=aux6jnt_r1 axis=(1 0 0) LinearFunction(coefficients=1 0)
        TransformAxis rotation3: coordinates=aux6jnt_r2 axis=(0 1 0) LinearFunction(coefficients=1 0)
    CustomJoint aux5jnt: socket_parent_frame=cerv5_offset socket_child_frame=cerv4_offset
      Coordinate aux5jnt_r3: default_value=2.622291e-7 range=(-99999.9 99999.9) clamped=false
      Coordinate aux5jnt_r1: default_value=0 range=(-99999.9 99999.9) clamped=false
      Coordinate aux5jnt_r2: default_value=0 range=(-99999.9 99999.9) clamped=false
      PhysicalOffsetFrame cerv5_offset: socket_parent=/bodyset/cerv5 translation=(0.00843 0.00745 0)
      PhysicalOffsetFrame cerv4_offset: socket_parent=/bodyset/cerv4 translation=(0.00502 -0.01172 0)
      SpatialTransform: axes_held_at_zero=(translation1 translation2 translation3)
        TransformAxis rotation1: coordinates=aux5jnt_r3 axis=(0 0 1) LinearFunction(coefficients=1 0)
        TransformAxis rotation2: coordinates=aux5jnt_r1 axis=(1 0 0) LinearFunction(coefficients=1 0)
        TransformAxis rotation3: coordinates=aux5jnt_r2 axis=(0 1 0) LinearFunction(coefficients=1 0)
    CustomJoint aux4jnt: socket_parent_frame=cerv4_offset socket_child_frame=cerv3_offset
      Coordinate aux4jnt_r3: default_value=1.966718e-7 range=(-99999.9 99999.9) clamped=false
      Coordinate aux4jnt_r1: default_value=0 range=(-99999.9 99999.9) clamped=false
      Coordinate aux4jnt_r2: default_value=0 range=(-99999.9 99999.9) clamped=false
      PhysicalOffsetFrame cerv4_offset: socket_parent=/bodyset/cerv4 translation=(0.00732 0.00638 0)
      PhysicalOffsetFrame cerv3_offset: socket_parent=/bodyset/cerv3 translation=(0.00471 -0.00902 0)
      SpatialTransform: axes_held_at_zero=(translation1 translation2 translation3)
        TransformAxis rotation1: coordinates=aux4jnt_r3 axis=(0 0 1) LinearFunction(coefficients=1 0)
        TransformAxis rotation2: coordinates=aux4jnt_r1 axis=(1 0 0) LinearFunction(coefficients=1 0)
        TransformAxis rotation3: coordinates=aux4jnt_r2 axis=(0 1 0) LinearFunction(coefficients=1 0)
    CustomJoint aux3jnt: socket_parent_frame=cerv3_offset socket_child_frame=cerv2_offset
      Coordinate aux3jnt_r3: default_value=1.311145e-7 range=(-99999.9 99999.9) clamped=false
      Coordinate aux3jnt_r1: default_value=0 range=(-99999.9 99999.9) clamped=false
      Coordinate aux3jnt_r2: default_value=0 range=(-99999.9 99999.9) clamped=false
      PhysicalOffsetFrame cerv3_offset: socket_parent=/bodyset/cerv3 translation=(0.00525 0.00506 0)
      PhysicalOffsetFrame cerv2_offset: socket_parent=/bodyset/cerv2 translation=(0.00543 -0.01123 0)
      SpatialTransform: axes_held_at_zero=(translation1 translation2 translation3)
        TransformAxis rotation1: coordinates=aux3jnt_r3 axis=(0 0 1) LinearFunction(coefficients=1 0)
        TransformAxis rotation2: coordinates=aux3jnt_r1 axis=(1 0 0) LinearFunction(coefficients=1 0)
        TransformAxis rotation3: coordinates=aux3jnt_r2 axis=(0 1 0) LinearFunction(coefficients=1 0)
    CustomJoint aux2jnt: socket_parent_frame=cerv2_offset socket_child_frame=cerv1_offset
      Coordinate pitch1: default_value=1.574161e-6 range=(-0.335103 0.502655) clamped=true
      Coordinate roll1: default_value=-1.889405e-33 range=(-0.125664 0.125664) clamped=true
      Coordinate yaw1: default_value=1.274842e-34 range=(-0.79587 0.79587) clamped=true
      PhysicalOffsetFrame cerv2_offset: socket_parent=/bodyset/cerv2 translation=(0.00689 0.02128 0)
      PhysicalOffsetFrame cerv1_offset: socket_parent=/bodyset/cerv1 translation=(0.04245 0.00352 0)
      SpatialTransform: axes_held_at_zero=(translation1 translation2 translation3)
        TransformAxis rotation1: coordinates=pitch1 axis=(0 0 1)
          SimmSpline: x=(-1.74533 1.74533) y=(-0.774926 0.774926)
        TransformAxis rotation2: coordinates=roll1 axis=(1 0 0)
          SimmSpline: x=(-1.74533 1.74533) y=(-0.872665 0.872665)
        TransformAxis rotation3: coordinates=yaw1 axis=(0 1 0)
          SimmSpline: x=(-1.74533 1.74533) y=(-1.5516 1.5516)
    CustomJoint aux1jnt: socket_parent_frame=cerv1_offset socket_child_frame=skull_offset
      Coordinate aux1jnt_r3: default_value=8.752333e-7 range=(-99999.9 99999.9) clamped=false
      Coordinate aux1jnt_r1: default_value=0 range=(-99999.9 99999.9) clamped=false
      Coordinate aux1jnt_r2: default_value=0 range=(-99999.9 99999.9) clamped=false
      PhysicalOffsetFrame cerv1_offset: socket_parent=/bodyset/cerv1 translation=(0.04335 0.01492 0)
      PhysicalOffsetFrame skull_offset: socket_parent=/bodyset/skull translation=(0 0 0)
      SpatialTransform: axes_held_at_zero=(translation1 translation2 translation3)
        TransformAxis rotation1: coordinates=aux1jnt_r3 axis=(0 0 1) LinearFunction(coefficients=1 0)
        TransformAxis rotation2: coordinates=aux1jnt_r1 axis=(1 0 0) LinearFunction(coefficients=1 0)
        TransformAxis rotation3: coordinates=aux1jnt_r2 axis=(0 1 0) LinearFunction(coefficients=1 0)
    WeldJoint jawjnt: socket_parent_frame=skull_offset socket_child_frame=jaw_offset
      PhysicalOffsetFrame skull_offset: socket_parent=/bodyset/skull translation=(0 0 0)
      PhysicalOffsetFrame jaw_offset: socket_parent=/bodyset/jaw translation=(0 0 0)
    CustomJoint Right_Eye_Joint: socket_parent_frame=skull_offset socket_child_frame=r_eye_offset
      Coordinate r_eye_add_abd: default_value=0 range=(-0.698132 0.698132) clamped=false
      Coordinate r_eye_sup_inf: default_value=0 range=(-0.698132 0.698132) clamped=false
      Coordinate r_eye_inc_exc: default_value=0 range=(-0.174533 0.174533) clamped=false
      PhysicalOffsetFrame skull_offset: socket_parent=/bodyset/skull translation=(0.077 0.051 0.034)
      PhysicalOffsetFrame r_eye_offset: socket_parent=/bodyset/r_eye translation=(0 0 0)
      SpatialTransform: axes_held_at_zero=(translation1 translation2 translation3)
        TransformAxis rotation1: coordinates=r_eye_add_abd axis=(0 1 0) LinearFunction(coefficients=1 0)
        TransformAxis rotation2: coordinates=r_eye_sup_inf axis=(0 0 1) LinearFunction(coefficients=1 0)
        TransformAxis rotation3: coordinates=r_eye_inc_exc axis=(1 0 0) LinearFunction(coefficients=1 0)
    CustomJoint Left_Eye_Joint: socket_parent_frame=skull_offset socket_child_frame=l_eye_offset
      Coordinate l_eye_add_abd: default_value=0 range=(-0.698132 0.698132) clamped=false
      Coordinate l_eye_sup_inf: default_value=0 range=(-0.698132 0.698132) clamped=false
      Coordinate l_eye_inc_exc: default_value=0 range=(-0.174533 0.174533) clamped=false
      PhysicalOffsetFrame skull_offset: socket_parent=/bodyset/skull translation=(0.077 0.051 -0.034)
      PhysicalOffsetFrame l_eye_offset: socket_parent=/bodyset/l_eye translation=(0 0 0)
      SpatialTransform: axes_held_at_zero=(translation1 translation2 translation3)
        TransformAxis rotation1: coordinates=l_eye_add_abd axis=(0 1 0) LinearFunction(coefficients=1 0)
        TransformAxis rotation2: coordinates=l_eye_sup_inf axis=(0 0 1) LinearFunction(coefficients=1 0)
        TransformAxis rotation3: coordinates=l_eye_inc_exc axis=(1 0 0) LinearFunction(coefficients=1 0)
  ControllerSet:
    FixationController Binocular_Fixation_Controller: socket_actuators=(/forceset/r_Lateral_Rectus /forceset/r_Medial_Rectus /forceset/r_Superior_Rectus /forceset/r_Inferior_Rectus /forceset/r_Superior_Oblique /forceset/r_Inferior_Oblique /forceset/l_Lateral_Rectus /forceset/l_Medial_Rectus /forceset/l_Superior_Rectus /forceset/l_Inferior_Rectus /forceset/l_Superior_Oblique /forceset/l_Inferior_Oblique)
        target_location=(2 0.5 0)
    HeadNeckNeuralControllerAdaptive VCR_CCR_Controller: delay_vcr=0.01 [seconds] delay_ccr=0.015 [seconds]
        Kp_proprioception=0.3082 z_ccr=8.4129 p_ccr=170.6536 K_recip_inhib=0 Kg_proprioception=0 K_vestibular=2
        K_otolith=4 desired_yaw=0 [rad] desired_pitch=0 [rad] desired_roll=0 [rad] K_ton=0.58 p_ton=78.0001 K_sc=0.0974
        z_sc=21.5985 p_sc=90.005 K_phas=4.532 p_phas=15.0046 k_p=0.3082 K_gamma_dyn=0.7339 K_gamma_stat=1.1482
        K_gamma=1 Wp_base_pitch=400 Wv_base_pitch=40 k_vigor=0 Wp_base_roll=400 Wv_base_roll=40 Wp_base_yaw=400
        Wv_base_yaw=40 Kp_task_pitch=0 [Nm/rad] Kd_task_pitch=0 Kp_task_roll=10.21 [Nm/rad] Kd_task_roll=1.29
        Kp_task_yaw=0.24 [Nm/rad] Kd_task_yaw=0.12 Ki_task=40.2786 Ki_task_pitch=40.2786 [Nm/(rad*s]
        Ki_task_roll=0 [Nm/(rad*s] Ki_task_yaw=0 [Nm/(rad*s] trajectory_tau=0.1 use_dynamic_jacobian=true K_eso=0
        use_smith_predictor=true delay_smith_proprio=0.007 delay_afferent_proprio=0.007 delay_afferent_vestibular=0.002
        enable_adaptation=true adaptation_rate_multiplier=1 sigma_leakage=0.01 adaptation_start_time=2.5 [seconds]
        multisine_scale=0.142887
  ConstraintSet:
    CoordinateCouplerConstraint aux7jnt_r1_con: independent_coordinate_names=roll2 dependent_coordinate_name=aux7jnt_r1
      coupled_coordinates_function: SimmSpline: x=(-1.74533 1.74533) y=(-0.23911 0.23911)
    CoordinateCouplerConstraint aux7jnt_r2_con: independent_coordinate_names=yaw2 dependent_coordinate_name=aux7jnt_r2
      coupled_coordinates_function: SimmSpline: x=(-1.74533 1.74533) y=(-0.328122 0.328122)
    CoordinateCouplerConstraint aux7jnt_r3_con: independent_coordinate_names=pitch2
        dependent_coordinate_name=aux7jnt_r3
      coupled_coordinates_function: SimmSpline: x=(-1.74533 1.74533) y=(-0.326377 0.326377)
    CoordinateCouplerConstraint aux6jnt_r1_con: independent_coordinate_names=roll2 dependent_coordinate_name=aux6jnt_r1
      coupled_coordinates_function: SimmSpline: x=(-1.74533 1.74533) y=(-0.274017 0.274017)
    CoordinateCouplerConstraint aux6jnt_r2_con: independent_coordinate_names=yaw2 dependent_coordinate_name=aux6jnt_r2
      coupled_coordinates_function: SimmSpline: x=(-1.74533 1.74533) y=(-0.382227 0.382227)
    CoordinateCouplerConstraint aux6jnt_r3_con: independent_coordinate_names=pitch2
        dependent_coordinate_name=aux6jnt_r3
      coupled_coordinates_function: SimmSpline: x=(-1.74533 1.74533) y=(-0.383972 0.383972)
    CoordinateCouplerConstraint aux5jnt_r1_con: independent_coordinate_names=roll2 dependent_coordinate_name=aux5jnt_r1
      coupled_coordinates_function: SimmSpline: x=(-1.74533 1.74533) y=(-0.376991 0.376991)
    CoordinateCouplerConstraint aux5jnt_r2_con: independent_coordinate_names=yaw2 dependent_coordinate_name=aux5jnt_r2
      coupled_coordinates_function: SimmSpline: x=(-1.74533 1.74533) y=(-0.382227 0.382227)
    CoordinateCouplerConstraint aux5jnt_r3_con: independent_coordinate_names=pitch2
        dependent_coordinate_name=aux5jnt_r3
      coupled_coordinates_function: SimmSpline: x=(-1.74533 1.74533) y=(-0.383972 0.383972)
    CoordinateCouplerConstraint aux4jnt_r1_con: independent_coordinate_names=roll2 dependent_coordinate_name=aux4jnt_r1
      coupled_coordinates_function: SimmSpline: x=(-1.74533 1.74533) y=(-0.376991 0.376991)
    CoordinateCouplerConstraint aux4jnt_r2_con: independent_coordinate_names=yaw2 dependent_coordinate_name=aux4jnt_r2
      coupled_coordinates_function: SimmSpline: x=(-1.74533 1.74533) y=(-0.382227 0.382227)
    CoordinateCouplerConstraint aux4jnt_r3_con: independent_coordinate_names=pitch2
        dependent_coordinate_name=aux4jnt_r3
      coupled_coordinates_function: SimmSpline: x=(-1.74533 1.74533) y=(-0.287979 0.287979)
    CoordinateCouplerConstraint aux3jnt_r1_con: independent_coordinate_names=roll2 dependent_coordinate_name=aux3jnt_r1
      coupled_coordinates_function: SimmSpline: x=(-1.74533 1.74533) y=(-0.342085 0.342085)
    CoordinateCouplerConstraint aux3jnt_r2_con: independent_coordinate_names=yaw2 dependent_coordinate_name=aux3jnt_r2
      coupled_coordinates_function: SimmSpline: x=(-1.74533 1.74533) y=(-0.164061 0.164061)
    CoordinateCouplerConstraint aux3jnt_r3_con: independent_coordinate_names=pitch2
        dependent_coordinate_name=aux3jnt_r3
      coupled_coordinates_function: SimmSpline: x=(-1.74533 1.74533) y=(-0.191986 0.191986)
    CoordinateCouplerConstraint aux1jnt_r1_con: independent_coordinate_names=roll1 dependent_coordinate_name=aux1jnt_r1
      coupled_coordinates_function: SimmSpline: x=(-1.74533 1.74533) y=(-0.872665 0.872665)
    CoordinateCouplerConstraint aux1jnt_r2_con: independent_coordinate_names=yaw1 dependent_coordinate_name=aux1jnt_r2
      coupled_coordinates_function: SimmSpline: x=(-1.74533 1.74533) y=(-0.193732 0.193732)
    CoordinateCouplerConstraint aux1jnt_r3_con: independent_coordinate_names=pitch1
        dependent_coordinate_name=aux1jnt_r3
      coupled_coordinates_function: SimmSpline: x=(-1.74533 1.74533) y=(-0.970403 0.970403)
  ForceSet:
    PointActuator Skull_Impact: appliesForce=false min_control=1 max_control=1 body=skull point=(0 0.2 0)
        direction=(0 0 1) force_is_global=true optimal_force=150
    TorqueActuator Skull_Moment: appliesForce=false min_control=1 max_control=1 bodyA=skull bodyB=ground
        torque_is_global=true axis=(0 1 0) optimal_force=20
    Millard12EqMuscleWithAfferents [values shared by the 84 below unless stated]:
      ActiveForceLengthCurve: min_norm_active_fiber_length=0.4441 transition_norm_fiber_length=0.73
          max_norm_active_fiber_length=1.8123 shallow_ascending_slope=0.8616 minimum_value=0
      ForceVelocityCurve: concentric_slope_at_vmax=0 concentric_slope_near_vmax=0.25 isometric_slope=5
          eccentric_slope_at_vmax=0 eccentric_slope_near_vmax=0.15 max_eccentric_velocity_force_multiplier=1.4
          concentric_curviness=0.6 eccentric_curviness=0.9
      FiberForceLengthCurve
      TendonForceLengthCurve
    Millard12EqMuscleWithAfferents digastric_post: max_isometric_force=109.62 optimal_fiber_length=0.0205
        tendon_slack_length=0.034134 pennation_angle_at_optimal=0.2496 [radians] minimum_activation=0.01
      PathPoint digastric-post-P1: skull (-0.0061 0.0034 0.0477)
      PathPoint digastric-post-P2: cerv3 (0.02321 0.00597 0.0287)
      Mileusnic06Spindle spindle
      Lin02GolgiTendonOrgan GTO
    Millard12EqMuscleWithAfferents digastric_ant: max_isometric_force=109.62 optimal_fiber_length=0.0142
        tendon_slack_length=0.005 pennation_angle_at_optimal=0 minimum_activation=0.01
      PathPoint digastric-post-P1: skull (0.0303 -0.0643 0.0173)
      PathPoint digastric-post-P2: cerv1 (0.07289 -0.05758 0.0057)
      Mileusnic06Spindle spindle
      Lin02GolgiTendonOrgan GTO
    Millard12EqMuscleWithAfferents Geniohyoid: max_isometric_force=91.665 optimal_fiber_length=0.0343
        tendon_slack_length=0.00542 pennation_angle_at_optimal=0 minimum_activation=0.01
      PathPoint digastric-post-P1: cerv1 (0.0717298 -0.0537906 0.00509443)
      PathPoint digastric-post-P2: skull (0.0691 -0.0673 0.0016)
      Mileusnic06Spindle spindle
      Lin02GolgiTendonOrgan GTO
    Millard12EqMuscleWithAfferents Mylohyoid_Post: max_isometric_force=50.085 optimal_fiber_length=0.0282
        tendon_slack_length=0.01401339 pennation_angle_at_optimal=0 minimum_activation=0.01
      PathPoint digastric-post-P1: cerv1 (0.07525 -0.05588 0.0031)
      PathPoint digastric-post-P2: skull (0.0413 -0.0389 0.0291)
      Mileusnic06Spindle spindle
      Lin02GolgiTendonOrgan GTO
    Millard12EqMuscleWithAfferents Mylohyoid_Ant: max_isometric_force=150.255 optimal_fiber_length=0.02
        tendon_slack_length=0.00274 pennation_angle_at_optimal=0 default_fiber_length=0.1 minimum_activation=0.01
      PathPoint digastric-post-P1: cerv1 (0.09725 -0.05668 -0.0031)
      PathPoint digastric-post-P2: skull (0.0579 -0.0596 0.0158)
      Mileusnic06Spindle spindle
      Lin02GolgiTendonOrgan GTO
    Millard12EqMuscleWithAfferents Stylohyoid_Lat: max_isometric_force=18.41786 optimal_fiber_length=0.0182
        tendon_slack_length=0.04955 pennation_angle_at_optimal=0.082 minimum_activation=0.01
      PathPoint digastric-post-P1: skull (0.0113 -0.0008 0.0376)
      PathPoint digastric-post-P2: cerv1 (0.0643381 -0.0496832 0.01544)
      Mileusnic06Spindle spindle
      Lin02GolgiTendonOrgan GTO
    Millard12EqMuscleWithAfferents Stylohyoid_Med: max_isometric_force=18.41786 optimal_fiber_length=0.0182
        tendon_slack_length=0.04362451 pennation_angle_at_optimal=0.08203 minimum_activation=0.01
      PathPoint digastric-post-P1: skull (0.0118 -0.002 0.0376)
      PathPoint digastric-post-P2: cerv1 (0.0632661 -0.0450538 0.0162521)
      Mileusnic06Spindle spindle
      Lin02GolgiTendonOrgan GTO
    Millard12EqMuscleWithAfferents Sterno_hyoid: max_isometric_force=54.81 optimal_fiber_length=0.0742
        tendon_slack_length=0.0318 pennation_angle_at_optimal=0 minimum_activation=0.01
      PathPoint stern_mast-P1: cerv3 (0.05742 -0.02314 0.00629)
      PathPoint default: ribcage (-0.014033 0.31252 0.01984)
      Mileusnic06Spindle spindle
      Lin02GolgiTendonOrgan GTO
    Millard12EqMuscleWithAfferents SternoThyroid: max_isometric_force=61.425 optimal_fiber_length=0.06195
        tendon_slack_length=0.02655 pennation_angle_at_optimal=0 minimum_activation=0.01
      PathPoint stern_mast-P1: cerv3 (0.0404201 -0.04316 0.0133)
      PathPoint default: ribcage (-0.014643 0.30575 0.0153)
      Mileusnic06Spindle spindle
      Lin02GolgiTendonOrgan GTO
    Millard12EqMuscleWithAfferents Omo_hyoid: max_isometric_force=70.875 optimal_fiber_length=0.04585
        tendon_slack_length=0.01965 pennation_angle_at_optimal=0 minimum_activation=0.01
      PathPoint stern_mast-P1: cerv3 (0.05212 -0.0139 0.0132)
      PathPoint default: ribcage (-0.021033 0.37083 0.03774)
      Mileusnic06Spindle spindle
      Lin02GolgiTendonOrgan GTO
    Millard12EqMuscleWithAfferents digastric_post_L: max_isometric_force=109.62 optimal_fiber_length=0.0205
        tendon_slack_length=0.034134 pennation_angle_at_optimal=0.2496 minimum_activation=0.01
      PathPoint digastric-post-P1: skull (-0.0061 0.0034 -0.0477)
      PathPoint digastric-post-P2: cerv3 (0.02321 0.00597 -0.0287)
      Mileusnic06Spindle spindle
      Lin02GolgiTendonOrgan GTO
    Millard12EqMuscleWithAfferents digastric_ant_L: max_isometric_force=109.62 optimal_fiber_length=0.0142
        tendon_slack_length=0.005 pennation_angle_at_optimal=0 minimum_activation=0.01
      PathPoint digastric-post-P1: skull (0.0303 -0.0643 -0.0173)
      PathPoint digastric-post-P2: cerv1 (0.07289 -0.05758 -0.0057)
      Mileusnic06Spindle spindle
      Lin02GolgiTendonOrgan GTO
    Millard12EqMuscleWithAfferents Geniohyoid_L: max_isometric_force=91.665 optimal_fiber_length=0.0343
        tendon_slack_length=0.00542 pennation_angle_at_optimal=0 minimum_activation=0.01
      PathPoint digastric-post-P1: cerv1 (0.0714947 -0.0538159 -0.00630312)
      PathPoint digastric-post-P2: skull (0.0691 -0.0673 -0.0016)
      Mileusnic06Spindle spindle
      Lin02GolgiTendonOrgan GTO
    Millard12EqMuscleWithAfferents Mylohyoid_Post_L: max_isometric_force=50.085 optimal_fiber_length=0.0282
        tendon_slack_length=0.01401339 pennation_angle_at_optimal=0 minimum_activation=0.01
      PathPoint digastric-post-P1: cerv1 (0.07525 -0.05588 -0.0031)
      PathPoint digastric-post-P2: skull (0.0413 -0.0389 -0.0291)
      Mileusnic06Spindle spindle
      Lin02GolgiTendonOrgan GTO
    Millard12EqMuscleWithAfferents Mylohyoid_Ant_L: max_isometric_force=150.255 optimal_fiber_length=0.02
        tendon_slack_length=0.00274 pennation_angle_at_optimal=0 minimum_activation=0.01
      PathPoint digastric-post-P1: cerv1 (0.09725 -0.05668 0.0031)
      PathPoint digastric-post-P2: skull (0.0579 -0.0596 -0.0158)
      Mileusnic06Spindle spindle
      Lin02GolgiTendonOrgan GTO
    Millard12EqMuscleWithAfferents Stylohyoid_Lat_L: max_isometric_force=18.41786 optimal_fiber_length=0.0182
        tendon_slack_length=0.04955 pennation_angle_at_optimal=0.082 minimum_activation=0.01
      PathPoint digastric-post-P1: skull (0.0113 -0.0008 -0.0376)
      PathPoint digastric-post-P2: cerv1 (0.0636822 -0.0497536 -0.0163531)
      Mileusnic06Spindle spindle
      Lin02GolgiTendonOrgan GTO
    Millard12EqMuscleWithAfferents Stylohyoid_Med_L: max_isometric_force=18.41786 optimal_fiber_length=0.0182
        tendon_slack_length=0.04362451 pennation_angle_at_optimal=0.08203 minimum_activation=0.01
      PathPoint digastric-post-P1: skull (0.0118 -0.002 -0.0376)
      PathPoint digastric-post-P2: cerv1 (0.0625772 -0.0451277 -0.0171408)
      Mileusnic06Spindle spindle
      Lin02GolgiTendonOrgan GTO
    Millard12EqMuscleWithAfferents Sterno_hyoid_L: max_isometric_force=54.81 optimal_fiber_length=0.0742
        tendon_slack_length=0.0318 pennation_angle_at_optimal=0 minimum_activation=0.01
      PathPoint stern_mast-P1: cerv3 (0.05742 -0.02314 -0.00629)
      PathPoint default: ribcage (-0.014033 0.31252 -0.01984)
      Mileusnic06Spindle spindle
      Lin02GolgiTendonOrgan GTO
    Millard12EqMuscleWithAfferents SternoThyroid_L: max_isometric_force=61.425 optimal_fiber_length=0.06195
        tendon_slack_length=0.02655 pennation_angle_at_optimal=0 minimum_activation=0.01
      PathPoint stern_mast-P1: cerv3 (0.0404201 -0.04316 -0.0133)
      PathPoint default: ribcage (-0.014643 0.30575 -0.0153)
      Mileusnic06Spindle spindle
      Lin02GolgiTendonOrgan GTO
    Millard12EqMuscleWithAfferents Omo_hyoid_L: max_isometric_force=70.875 optimal_fiber_length=0.04585
        tendon_slack_length=0.01965 pennation_angle_at_optimal=0 minimum_activation=0.01
      PathPoint stern_mast-P1: cerv3 (0.05212 -0.0139 -0.0132)
      PathPoint default: ribcage (-0.021033 0.37083 -0.03774)
      Mileusnic06Spindle spindle
      Lin02GolgiTendonOrgan GTO
    Millard12EqMuscleWithAfferents stern_mast: max_isometric_force=186.165 optimal_fiber_length=0.108
        tendon_slack_length=0.056123 pennation_angle_at_optimal=0.2617994 minimum_activation=0.01
      PathPoint P1: ribcage (-0.0007 0.3269 0.0096)
      PathPoint P2: skull (-0.0051 0.00693 0.0643)
      Mileusnic06Spindle spindle
      Lin02GolgiTendonOrgan GTO
    Millard12EqMuscleWithAfferents stern_mast_L: max_isometric_force=186.165 optimal_fiber_length=0.108
        tendon_slack_length=0.056123 pennation_angle_at_optimal=0.2617994 minimum_activation=0.01
      PathPoint P1: ribcage (-0.0007 0.3269 -0.0096)
      PathPoint P2: skull (-0.0051 0.00693 -0.0643)
      Mileusnic06Spindle spindle
      Lin02GolgiTendonOrgan GTO
    Millard12EqMuscleWithAfferents cleid_mast: max_isometric_force=93.0825 optimal_fiber_length=0.108
        tendon_slack_length=0.035198 pennation_angle_at_optimal=0.2617994 minimum_activation=0.01
      PathPoint P1: rclavicle (0.00388 0.00542 0.0352)
      PathPoint P2: skull (-0.0051 0.00693 0.0643)
      Mileusnic06Spindle spindle
      Lin02GolgiTendonOrgan GTO
    Millard12EqMuscleWithAfferents cleid_mast_L: max_isometric_force=93.0825 optimal_fiber_length=0.108
        tendon_slack_length=0.035198 pennation_angle_at_optimal=0.2617994 minimum_activation=0.01
      PathPoint P1: lclavicle (0.00388 0.00542 -0.0352)
      PathPoint P2: skull (-0.0051 0.00693 -0.0643)
      Mileusnic06Spindle spindle
      Lin02GolgiTendonOrgan GTO
    Millard12EqMuscleWithAfferents cleid_occ: max_isometric_force=93.0825 optimal_fiber_length=0.108
        tendon_slack_length=0.069467 pennation_angle_at_optimal=0.2617994 minimum_activation=0.01
      PathPoint P1: rclavicle (0.00388 0.00542 0.0352)
      PathPoint P2: skull (-0.035 0.023 0.0664)
      Mileusnic06Spindle spindle
      Lin02GolgiTendonOrgan GTO
    Millard12EqMuscleWithAfferents cleid_occ_L: max_isometric_force=93.0825 optimal_fiber_length=0.108
        tendon_slack_length=0.069467 pennation_angle_at_optimal=0.2617994 minimum_activation=0.01
      PathPoint P1: lclavicle (0.00388 0.00542 -0.0352)
      PathPoint P2: skull (-0.035 0.023 -0.0664)
      Mileusnic06Spindle spindle
      Lin02GolgiTendonOrgan GTO
    Millard12EqMuscleWithAfferents scalenus_ant: max_isometric_force=138.915 optimal_fiber_length=0.042
        tendon_slack_length=0.053421 pennation_angle_at_optimal=0.1745329 minimum_activation=0.01
      PathPoint P1: ribcage (-0.02139 0.33246 0.0529)
      PathPoint P2: cerv4 (0.00713 0.0079 0.02323)
      Mileusnic06Spindle spindle
      Lin02GolgiTendonOrgan GTO
    Millard12EqMuscleWithAfferents scalenus_ant_L: max_isometric_force=138.915 optimal_fiber_length=0.042
        tendon_slack_length=0.053421 pennation_angle_at_optimal=0.1745329 minimum_activation=0.01
      PathPoint P1: ribcage (-0.02139 0.33246 -0.0529)
      PathPoint P2: cerv4 (0.00713 0.0079 -0.02323)
      Mileusnic06Spindle spindle
      Lin02GolgiTendonOrgan GTO
    Millard12EqMuscleWithAfferents scalenus_med: max_isometric_force=100.94 optimal_fiber_length=0.05
        tendon_slack_length=0.061508 pennation_angle_at_optimal=0.1745329 minimum_activation=0.01
      PathPoint P1: ribcage (-0.03398 0.34333 0.0627)
      PathPoint P2: cerv3 (-0.00902 0.00981 0.02119)
      Mileusnic06Spindle spindle
      Lin02GolgiTendonOrgan GTO
    Millard12EqMuscleWithAfferents scalenus_med_L: max_isometric_force=100.94 optimal_fiber_length=0.05
        tendon_slack_length=0.061508 pennation_angle_at_optimal=0.1745329 minimum_activation=0.01
      PathPoint P1: ribcage (-0.03398 0.34333 -0.0627)
      PathPoint P2: cerv3 (-0.00902 0.00981 -0.02119)
      Mileusnic06Spindle spindle
      Lin02GolgiTendonOrgan GTO
    Millard12EqMuscleWithAfferents scalenus_post: max_isometric_force=76.93 optimal_fiber_length=0.062
        tendon_slack_length=0.072845 pennation_angle_at_optimal=0.1745329 minimum_activation=0.01
      PathPoint P1: ribcage (-0.03638 0.3127 0.1062)
      PathPoint P2: cerv5 (-0.0032 0.01371 0.0257)
      Mileusnic06Spindle spindle
      Lin02GolgiTendonOrgan GTO
    Millard12EqMuscleWithAfferents scalenus_post_L: max_isometric_force=76.93 optimal_fiber_length=0.062
        tendon_slack_length=0.072845 pennation_angle_at_optimal=0.1745329 minimum_activation=0.01
      PathPoint P1: ribcage (-0.03638 0.3127 -0.1062)
      PathPoint P2: cerv5 (-0.0032 0.01371 -0.0257)
      Mileusnic06Spindle spindle
      Lin02GolgiTendonOrgan GTO
    Millard12EqMuscleWithAfferents long_cap_sklc4: max_isometric_force=89.964 optimal_fiber_length=0.038
        tendon_slack_length=0.041297 pennation_angle_at_optimal=0.08726646 minimum_activation=0.01
      PathPoint P1: cerv4 (0.00652 0.01164 0.0242)
      PathPoint P2: cerv3 (0.01197 0.01009 0.01897)
      PathPoint P3: cerv2 (0.0172 0.00829 0.01477)
      PathPoint P4: cerv1 (0.05818 0.00309 0.01159)
      PathPoint P5: skull (0.0098 0.01596 0.0036)
      Mileusnic06Spindle spindle
      Lin02GolgiTendonOrgan GTO
    Millard12EqMuscleWithAfferents long_cap_sklc4_L: max_isometric_force=89.964 optimal_fiber_length=0.038
        tendon_slack_length=0.041297 pennation_angle_at_optimal=0.08726646 minimum_activation=0.01
      PathPoint P1: cerv4 (0.00652 0.01164 -0.0242)
      PathPoint P2: cerv3 (0.01197 0.01009 -0.01897)
      PathPoint P3: cerv2 (0.0172 0.00829 -0.01477)
      PathPoint P4: cerv1 (0.05818 0.00309 -0.01159)
      PathPoint P5: skull (0.0098 0.01596 -0.0036)
      Mileusnic06Spindle spindle
      Lin02GolgiTendonOrgan GTO
    Millard12EqMuscleWithAfferents long_col_c1thx: max_isometric_force=32.319 optimal_fiber_length=0.08913
        tendon_slack_length=0.087519 pennation_angle_at_optimal=0.08726646 minimum_activation=0.01
      PathPoint P1: spine (-0.04888 0.30334 0.0037)
      PathPoint P2: cerv7 (0.0232 0.0011 0.004)
      PathPoint P3: cerv6 (0.02314 0.00231 0.00402)
      PathPoint P4: cerv5 (0.02228 0.00228 0.0039)
      PathPoint P5: cerv4 (0.02205 0.00331 0.00379)
      PathPoint P6: cerv3 (0.02212 0.00603 0.00368)
      PathPoint P7: cerv2 (0.02122 0.00973 0.00356)
      PathPoint P8: cerv1 (0.05825 0.00482 0.0031)
      Mileusnic06Spindle spindle
      Lin02GolgiTendonOrgan GTO
    Millard12EqMuscleWithAfferents long_col_c1thx_L: max_isometric_force=32.319 optimal_fiber_length=0.08913
        tendon_slack_length=0.087519 pennation_angle_at_optimal=0.08726646 minimum_activation=0.01
      PathPoint P1: spine (-0.04888 0.30334 -0.0037)
      PathPoint P2: cerv7 (0.0232 0.0011 -0.004)
      PathPoint P3: cerv6 (0.02314 0.00231 -0.00402)
      PathPoint P4: cerv5 (0.02228 0.00228 -0.0039)
      PathPoint P5: cerv4 (0.02205 0.00331 -0.00379)
      PathPoint P6: cerv3 (0.02212 0.00603 -0.00368)
      PathPoint P7: cerv2 (0.02122 0.00973 -0.00356)
      PathPoint P8: cerv1 (0.05825 0.00482 -0.0031)
      Mileusnic06Spindle spindle
      Lin02GolgiTendonOrgan GTO
    Millard12EqMuscleWithAfferents long_col_c1c5: max_isometric_force=32.319 optimal_fiber_length=0.03592
        tendon_slack_length=0.035239 pennation_angle_at_optimal=0.08726646 minimum_activation=0.01
      PathPoint P1: cerv5 (0.00669 0.00889 0.0238)
      PathPoint P2: cerv4 (0.01121 0.00749 0.0207)
      PathPoint P3: cerv2 (0.01739 0.00159 0.01365)
      PathPoint P4: cerv1 (0.05725 0.00482 0.0062)
      Mileusnic06Spindle spindle
      Lin02GolgiTendonOrgan GTO
    Millard12EqMuscleWithAfferents long_col_c1c5_L: max_isometric_force=32.319 optimal_fiber_length=0.03592
        tendon_slack_length=0.035239 pennation_angle_at_optimal=0.08726646 minimum_activation=0.01
      PathPoint P1: cerv5 (0.00669 0.00889 -0.0238)
      PathPoint P2: cerv4 (0.01121 0.00749 -0.0207)
      PathPoint P3: cerv2 (0.01739 0.00159 -0.01365)
      PathPoint P4: cerv1 (0.05725 0.00482 -0.0062)
      Mileusnic06Spindle spindle
      Lin02GolgiTendonOrgan GTO
    Millard12EqMuscleWithAfferents long_col_c5thx: max_isometric_force=32.319 optimal_fiber_length=0.05758
        tendon_slack_length=0.054794 pennation_angle_at_optimal=0.08726646 minimum_activation=0.01
      PathPoint P1: spine (-0.04981 0.30296 0.0068)
      PathPoint P2: spine (-0.04825 0.32027 0.01022)
      PathPoint P3: spine (-0.04566 0.33463 0.01337)
      PathPoint P4: spine (-0.04466 0.3436 0.01508)
      PathPoint P5: spine (-0.04239 0.35783 0.01778)
      PathPoint P6: cerv7 (0.01111 0.00731 0.01979)
      PathPoint P7: cerv6 (0.00961 0.00713 0.02216)
      PathPoint P8: cerv5 (0.00669 0.00889 0.0238)
      Mileusnic06Spindle spindle
      Lin02GolgiTendonOrgan GTO
    Millard12EqMuscleWithAfferents long_col_c5thx_L: max_isometric_force=32.319 optimal_fiber_length=0.05758
        tendon_slack_length=0.054794 pennation_angle_at_optimal=0.08726646 minimum_activation=0.01
      PathPoint P1: spine (-0.04981 0.30296 -0.0068)
      PathPoint P2: spine (-0.04825 0.32027 -0.01022)
      PathPoint P3: spine (-0.04566 0.33463 -0.01337)
      PathPoint P4: spine (-0.04466 0.3436 -0.01508)
      PathPoint P5: spine (-0.04239 0.35783 -0.01778)
      PathPoint P6: cerv7 (0.01111 0.00731 -0.01979)
      PathPoint P7: cerv6 (0.00961 0.00713 -0.02216)
      PathPoint P8: cerv5 (0.00669 0.00889 -0.0238)
      Mileusnic06Spindle spindle
      Lin02GolgiTendonOrgan GTO
    Millard12EqMuscleWithAfferents trap_cl: max_isometric_force=108.64 optimal_fiber_length=0.084
        tendon_slack_length=0.119222 pennation_angle_at_optimal=0.5235988 minimum_activation=0.01
      PathPoint P1: rclavicle (-0.0294 0.0232 0.0869)
      PathPoint P2: skull (-0.08031 0.02604 0.01324)
      Mileusnic06Spindle spindle
      Lin02GolgiTendonOrgan GTO
    Millard12EqMuscleWithAfferents trap_cl_L: max_isometric_force=108.64 optimal_fiber_length=0.084
        tendon_slack_length=0.119222 pennation_angle_at_optimal=0.5235988 minimum_activation=0.01
      PathPoint P1: lclavicle (-0.0294 0.0232 -0.0869)
      PathPoint P2: skull (-0.08031 0.02604 -0.01324)
      Mileusnic06Spindle spindle
      Lin02GolgiTendonOrgan GTO
    Millard12EqMuscleWithAfferents trap_acr: max_isometric_force=527.73 optimal_fiber_length=0.092
        tendon_slack_length=0.076582 pennation_angle_at_optimal=0 minimum_activation=0.01
      PathPoint P1: rscapula (-0.02379 -0.00916 -0.00736)
      PathPoint P2: cerv7 (-0.0477 0.019 0.00305)
      Mileusnic06Spindle spindle
      Lin02GolgiTendonOrgan GTO
    Millard12EqMuscleWithAfferents trap_acr_L: max_isometric_force=527.73 optimal_fiber_length=0.092
        tendon_slack_length=0.076582 pennation_angle_at_optimal=0 minimum_activation=0.01
      PathPoint P1: lscapula (-0.02379 -0.00916 0.00736)
      PathPoint P2: cerv7 (-0.0477 0.019 -0.00305)
      Mileusnic06Spindle spindle
      Lin02GolgiTendonOrgan GTO
    Millard12EqMuscleWithAfferents splen_cap_sklc6: max_isometric_force=69.314 optimal_fiber_length=0.095
        tendon_slack_length=0.026013 pennation_angle_at_optimal=0 minimum_activation=0.01
      PathPoint P1: cerv6 (-0.0486 0.01647 0.00305)
      PathPoint P2: skull (-0.06164 0.01918 0.044)
      Mileusnic06Spindle spindle
      Lin02GolgiTendonOrgan GTO
    Millard12EqMuscleWithAfferents splen_cap_sklc6_L: max_isometric_force=69.314 optimal_fiber_length=0.095
        tendon_slack_length=0.026013 pennation_angle_at_optimal=0 minimum_activation=0.01
      PathPoint P1: cerv6 (-0.0486 0.01647 -0.00305)
      PathPoint P2: skull (-0.06164 0.01918 -0.044)
      Mileusnic06Spindle spindle
      Lin02GolgiTendonOrgan GTO
    Millard12EqMuscleWithAfferents splen_cap_sklthx: max_isometric_force=69.314 optimal_fiber_length=0.095
        tendon_slack_length=0.081861 pennation_angle_at_optimal=0 minimum_activation=0.01
      PathPoint P1: spine (-0.10384 0.33902 0.003)
      PathPoint P2: skull (-0.04016 0.011 0.05423)
      Mileusnic06Spindle spindle
      Lin02GolgiTendonOrgan GTO
    Millard12EqMuscleWithAfferents splen_cap_sklthx_L: max_isometric_force=69.314 optimal_fiber_length=0.095
        tendon_slack_length=0.081861 pennation_angle_at_optimal=0 minimum_activation=0.01
      PathPoint P1: spine (-0.10384 0.33902 -0.003)
      PathPoint P2: skull (-0.04016 0.011 -0.05423)
      Mileusnic06Spindle spindle
      Lin02GolgiTendonOrgan GTO
    Millard12EqMuscleWithAfferents splen_cerv_c3thx: max_isometric_force=69.314 optimal_fiber_length=0.095
        tendon_slack_length=0.108438 pennation_angle_at_optimal=0 minimum_activation=0.01
      PathPoint P1: spine (-0.12848 0.26222 0.0041)
      PathPoint P2: cerv3 (-0.00787 0.01005 0.02365)
      Mileusnic06Spindle spindle
      Lin02GolgiTendonOrgan GTO
    Millard12EqMuscleWithAfferents splen_cerv_c3thx_L: max_isometric_force=69.314 optimal_fiber_length=0.095
        tendon_slack_length=0.108438 pennation_angle_at_optimal=0 minimum_activation=0.01
      PathPoint P1: spine (-0.12848 0.26222 -0.0041)
      PathPoint P2: cerv3 (-0.00787 0.01005 -0.02365)
      Mileusnic06Spindle spindle
      Lin02GolgiTendonOrgan GTO
    Millard12EqMuscleWithAfferents semi_cap_sklc5: max_isometric_force=89.67 optimal_fiber_length=0.068
        tendon_slack_length=0.046562 pennation_angle_at_optimal=0.08726646 minimum_activation=0.01
      PathPoint P1: cerv5 (-0.00931 0.01154 0.0235)
      PathPoint P2: skull (-0.07441 0.02 0.018)
      Mileusnic06Spindle spindle
      Lin02GolgiTendonOrgan GTO
    Millard12EqMuscleWithAfferents semi_cap_sklc5_L: max_isometric_force=89.67 optimal_fiber_length=0.068
        tendon_slack_length=0.046562 pennation_angle_at_optimal=0.08726646 minimum_activation=0.01
      PathPoint P1: cerv5 (-0.00931 0.01154 -0.0235)
      PathPoint P2: skull (-0.07441 0.02 -0.018)
      Mileusnic06Spindle spindle
      Lin02GolgiTendonOrgan GTO
    Millard12EqMuscleWithAfferents semi_cap_sklthx: max_isometric_force=89.67 optimal_fiber_length=0.068
        tendon_slack_length=0.06889 pennation_angle_at_optimal=0.08726646 minimum_activation=0.01
      PathPoint P1: spine (-0.08539 0.37732 0.0347)
      PathPoint P2: skull (-0.07671 0.02 0.0111)
      Mileusnic06Spindle spindle
      Lin02GolgiTendonOrgan GTO
    Millard12EqMuscleWithAfferents semi_cap_sklthx_L: max_isometric_force=89.67 optimal_fiber_length=0.068
        tendon_slack_length=0.06889 pennation_angle_at_optimal=0.08726646 minimum_activation=0.01
      PathPoint P1: spine (-0.08539 0.37732 -0.0347)
      PathPoint P2: skull (-0.07671 0.02 -0.0111)
      Mileusnic06Spindle spindle
      Lin02GolgiTendonOrgan GTO
    Millard12EqMuscleWithAfferents semi_cerv_c3thx: max_isometric_force=89.67 optimal_fiber_length=0.068
        tendon_slack_length=0.027374 pennation_angle_at_optimal=0.08726646 minimum_activation=0.01
      PathPoint P1: spine (-0.08896 0.34997 0.02607)
      PathPoint P2: cerv3 (-0.04064 -0.00322 0.0024)
      Mileusnic06Spindle spindle
      Lin02GolgiTendonOrgan GTO
    Millard12EqMuscleWithAfferents semi_cerv_c3thx_L: max_isometric_force=89.67 optimal_fiber_length=0.068
        tendon_slack_length=0.027374 pennation_angle_at_optimal=0.08726646 minimum_activation=0.01
      PathPoint P1: spine (-0.08896 0.34997 -0.02607)
      PathPoint P2: cerv3 (-0.04064 -0.00322 -0.0024)
      Mileusnic06Spindle spindle
      Lin02GolgiTendonOrgan GTO
    Millard12EqMuscleWithAfferents levator_scap: max_isometric_force=106.82 optimal_fiber_length=0.113
        tendon_slack_length=0.021875 pennation_angle_at_optimal=0 minimum_activation=0.01
      PathPoint P1: rscapula (-0.09749 -0.03624 -0.08146)
      PathPoint P2: cerv2 (-0.01186 0.00725 0.02121)
      Mileusnic06Spindle spindle
      Lin02GolgiTendonOrgan GTO
    Millard12EqMuscleWithAfferents levator_scap_L: max_isometric_force=106.82 optimal_fiber_length=0.113
        tendon_slack_length=0.021875 pennation_angle_at_optimal=0 minimum_activation=0.01
      PathPoint P1: lscapula (-0.09749 -0.03624 0.08146)
      PathPoint P2: cerv2 (-0.01186 0.00725 -0.02121)
      Mileusnic06Spindle spindle
      Lin02GolgiTendonOrgan GTO
    Millard12EqMuscleWithAfferents longissi_cap_sklc6: max_isometric_force=43.652 optimal_fiber_length=0.07185
        tendon_slack_length=0.023946 pennation_angle_at_optimal=0 minimum_activation=0.01
      PathPoint P1: cerv6 (-0.00817 0.01515 0.02759)
      PathPoint P2: skull (-0.0344 0.0051 0.055)
      Mileusnic06Spindle spindle
      Lin02GolgiTendonOrgan GTO
    Millard12EqMuscleWithAfferents longissi_cap_sklc6_L: max_isometric_force=43.652 optimal_fiber_length=0.07185
        tendon_slack_length=0.023946 pennation_angle_at_optimal=0 minimum_activation=0.01
      PathPoint P1: cerv6 (-0.00817 0.01515 -0.02759)
      PathPoint P2: skull (-0.0344 0.0051 -0.055)
      Mileusnic06Spindle spindle
      Lin02GolgiTendonOrgan GTO
    Millard12EqMuscleWithAfferents longissi_cerv_c4thx: max_isometric_force=28.07 optimal_fiber_length=0.131813
        tendon_slack_length=0.042329 pennation_angle_at_optimal=0 minimum_activation=0.01
      PathPoint P1: spine (-0.10994 0.27586 0.03215)
      PathPoint P2: spine (-0.10918 0.30238 0.03041)
      PathPoint P3: spine (-0.09978 0.32692 0.02919)
      PathPoint P4: spine (-0.0813 0.373 0.0279)
      PathPoint P5: cerv4 (-0.00709 0.01157 0.0261)
      Mileusnic06Spindle spindle
      Lin02GolgiTendonOrgan GTO
    Millard12EqMuscleWithAfferents longissi_cerv_c4thx_L: max_isometric_force=28.07 optimal_fiber_length=0.131813
        tendon_slack_length=0.042329 pennation_angle_at_optimal=0 minimum_activation=0.01
      PathPoint P1: spine (-0.10994 0.27586 -0.03215)
      PathPoint P2: spine (-0.10918 0.30238 -0.03041)
      PathPoint P3: spine (-0.09978 0.32692 -0.02919)
      PathPoint P4: spine (-0.0813 0.373 -0.0279)
      PathPoint P5: cerv4 (-0.00709 0.01157 -0.0261)
      Mileusnic06Spindle spindle
      Lin02GolgiTendonOrgan GTO
    Millard12EqMuscleWithAfferents iliocost_cerv_c5rib: max_isometric_force=28.07 optimal_fiber_length=0.080895
        tendon_slack_length=0.025706 pennation_angle_at_optimal=0 minimum_activation=0.01
      PathPoint P1: spine (-0.10349 0.32797 0.0533)
      PathPoint P2: spine (-0.08374 0.37638 0.04035)
      PathPoint P3: cerv5 (-0.0094 0.01258 0.026)
      Mileusnic06Spindle spindle
      Lin02GolgiTendonOrgan GTO
    Millard12EqMuscleWithAfferents iliocost_cerv_c5rib_L: max_isometric_force=28.07 optimal_fiber_length=0.080895
        tendon_slack_length=0.025706 pennation_angle_at_optimal=0 minimum_activation=0.01
      PathPoint P1: spine (-0.10349 0.32797 -0.0533)
      PathPoint P2: spine (-0.08374 0.37638 -0.04035)
      PathPoint P3: cerv5 (-0.0094 0.01258 -0.026)
      Mileusnic06Spindle spindle
      Lin02GolgiTendonOrgan GTO
    Millard12EqMuscleWithAfferents rectcap_post_maj: max_isometric_force=45.668 optimal_fiber_length=0.037
        tendon_slack_length=0.022832 pennation_angle_at_optimal=0.08726646 minimum_activation=0.01
      PathPoint P1: cerv2 (-0.03637 -0.00647 0.0024)
      PathPoint P2: skull (-0.0604 0.009 0.023)
      Mileusnic06Spindle spindle
      Lin02GolgiTendonOrgan GTO
    Millard12EqMuscleWithAfferents rectcap_post_maj_L: max_isometric_force=45.668 optimal_fiber_length=0.037
        tendon_slack_length=0.022832 pennation_angle_at_optimal=0.08726646 minimum_activation=0.01
      PathPoint P1: cerv2 (-0.03637 -0.00647 -0.0024)
      PathPoint P2: skull (-0.0604 0.009 -0.023)
      Mileusnic06Spindle spindle
      Lin02GolgiTendonOrgan GTO
    Millard12EqMuscleWithAfferents rectcap_post_min: max_isometric_force=25.088 optimal_fiber_length=0.019
        tendon_slack_length=0.016897 pennation_angle_at_optimal=0.08726646 minimum_activation=0.01
      PathPoint P1: cerv1 (7e-5 0.0009 0.0061)
      PathPoint P2: skull (-0.0667 0.009 0.0145)
      Mileusnic06Spindle spindle
      Lin02GolgiTendonOrgan GTO
    Millard12EqMuscleWithAfferents rectcap_post_min_L: max_isometric_force=25.088 optimal_fiber_length=0.019
        tendon_slack_length=0.016897 pennation_angle_at_optimal=0.08726646 minimum_activation=0.01
      PathPoint P1: cerv1 (7e-5 0.0009 -0.0061)
      PathPoint P2: skull (-0.0667 0.009 -0.0145)
      Mileusnic06Spindle spindle
      Lin02GolgiTendonOrgan GTO
    Millard12EqMuscleWithAfferents obl_cap_sup: max_isometric_force=51.107 optimal_fiber_length=0.025
        tendon_slack_length=0.020417 pennation_angle_at_optimal=0.1745329 minimum_activation=0.01
      PathPoint P1: cerv1 (0.03505 0.00385 0.042)
      PathPoint P2: skull (-0.04758 0.00931 0.03818)
      Mileusnic06Spindle spindle
      Lin02GolgiTendonOrgan GTO
    Millard12EqMuscleWithAfferents obl_cap_sup_L: max_isometric_force=51.107 optimal_fiber_length=0.025
        tendon_slack_length=0.020417 pennation_angle_at_optimal=0.1745329 minimum_activation=0.01
      PathPoint P1: cerv1 (0.03505 0.00385 -0.042)
      PathPoint P2: skull (-0.04758 0.00931 -0.03818)
      Mileusnic06Spindle spindle
      Lin02GolgiTendonOrgan GTO
    Millard12EqMuscleWithAfferents obl_cap_inf: max_isometric_force=63.406 optimal_fiber_length=0.038
        tendon_slack_length=0.015607 pennation_angle_at_optimal=0 minimum_activation=0.01
      PathPoint P1: cerv2 (-0.03637 -0.00647 0.00547)
      PathPoint P2: cerv1 (0.02996 0.00349 0.03791)
      Mileusnic06Spindle spindle
      Lin02GolgiTendonOrgan GTO
    Millard12EqMuscleWithAfferents obl_cap_inf_L: max_isometric_force=63.406 optimal_fiber_length=0.038
        tendon_slack_length=0.015607 pennation_angle_at_optimal=0 minimum_activation=0.01
      PathPoint P1: cerv2 (-0.03637 -0.00647 -0.00547)
      PathPoint P2: cerv1 (0.02996 0.00349 -0.03791)
      Mileusnic06Spindle spindle
      Lin02GolgiTendonOrgan GTO
    BushingForce [values shared by the 8 below unless stated]: translational_stiffness=(0 0 0) [N/m]
        translational_damping=(0 0 0) [N/(m/s)]
    BushingForce Spine_C7_Bushing: socket_frame1=/bodyset/spine socket_frame2=/bodyset/cerv7
        rotational_stiffness=(27.5 13.75 27.5) [Nm/rad] rotational_damping=(2.75 1.375 2.75) [Nm/(rad/s)]
    BushingForce C7_C6_Bushing: socket_frame1=/bodyset/cerv7 socket_frame2=/bodyset/cerv6
        rotational_stiffness=(27.5 13.75 27.5) rotational_damping=(2.75 1.375 2.75)
    BushingForce C6_C5_Bushing: socket_frame1=/bodyset/cerv6 socket_frame2=/bodyset/cerv5
        rotational_stiffness=(27.5 13.75 27.5) rotational_damping=(2.75 1.375 2.75)
    BushingForce C5_C4_Bushing: socket_frame1=/bodyset/cerv5 socket_frame2=/bodyset/cerv4
        rotational_stiffness=(23.2 11.6 23.2) rotational_damping=(2.32 1.16 2.32)
    BushingForce C4_C3_Bushing: socket_frame1=/bodyset/cerv4 socket_frame2=/bodyset/cerv3
        rotational_stiffness=(23.2 11.6 23.2) rotational_damping=(2.32 1.16 2.32)
    BushingForce C3_C2_Bushing: socket_frame1=/bodyset/cerv3 socket_frame2=/bodyset/cerv2
        rotational_stiffness=(7.8 3.9 7.8) rotational_damping=(0.78 0.39 0.78)
    BushingForce C2_C1_Bushing: socket_frame1=/bodyset/cerv2 socket_frame2=/bodyset/cerv1
        rotational_stiffness=(7.8 3.9 7.8) rotational_damping=(0.78 0.39 0.78)
    BushingForce C1_skull_Bushing: socket_frame1=/bodyset/cerv1 socket_frame2=/bodyset/skull
        rotational_stiffness=(7.8 3.9 7.8) rotational_damping=(0.78 0.39 0.78)
    Millard12EqMuscleWithAfferents r_Lateral_Rectus: optimal_force=1 max_isometric_force=1.471
        optimal_fiber_length=0.04898 tendon_slack_length=0.0084 pennation_angle_at_optimal=0
        max_contraction_velocity=3.8484 ignore_tendon_compliance=true fiber_damping=0 default_activation=0
        default_fiber_length=0.0513 activation_time_constant=0.01 [seconds] deactivation_time_constant=0.04 [seconds]
        minimum_activation=0.01
      PathPoint RLR-Origin-P1: skull (0.043 0.0516 0.021)
      PathPoint RRL-Pulley-P2: skull (0.0668 0.0513 0.046)
      PathPoint RLR-Insertion-P3: r_eye (0.0065 0 0.0101)
      PathWrap: wrap_object=right_eye_wrap method=axial
      ActiveForceLengthCurve: min_norm_active_fiber_length=0.55 transition_norm_fiber_length=0.7
          max_norm_active_fiber_length=1.8 shallow_ascending_slope=2.4 minimum_value=0
      FiberForceLengthCurve: strain_at_zero_force=-0.18 strain_at_one_norm_force=0.4
      TendonForceLengthCurve: strain_at_one_norm_force=1
      Mileusnic06Spindle spindle
      Lin02GolgiTendonOrgan GTO
    Millard12EqMuscleWithAfferents r_Medial_Rectus: optimal_force=1 max_isometric_force=1.574
        optimal_fiber_length=0.04084 tendon_slack_length=0.0038 pennation_angle_at_optimal=0
        max_contraction_velocity=4.6155 ignore_tendon_compliance=true fiber_damping=0 default_activation=0
        default_fiber_length=0.0398 activation_time_constant=0.01 deactivation_time_constant=0.04
        minimum_activation=0.01
      PathPoint RMR-Origin-P1: skull (0.047 0.0516 0.017)
      PathPoint RML-Pulley-P2: skull (0.0717 0.05114 0.0194)
      PathPoint RMR-Insertion-P3: r_eye (0.0088 0 -0.0096)
      PathWrap: wrap_object=right_eye_wrap method=axial
      ActiveForceLengthCurve: min_norm_active_fiber_length=0.55 transition_norm_fiber_length=0.7
          max_norm_active_fiber_length=1.8 shallow_ascending_slope=2.4 minimum_value=0
      FiberForceLengthCurve: strain_at_zero_force=-0.18 strain_at_one_norm_force=0.4
      TendonForceLengthCurve: strain_at_one_norm_force=1
      Mileusnic06Spindle spindle
      Lin02GolgiTendonOrgan GTO
    Millard12EqMuscleWithAfferents r_Superior_Rectus: optimal_force=1 max_isometric_force=1.1768
        optimal_fiber_length=0.04487 tendon_slack_length=0.0054 pennation_angle_at_optimal=0
        max_contraction_velocity=4.2009 ignore_tendon_compliance=true fiber_damping=0 default_activation=0
        default_fiber_length=0.04495 activation_time_constant=0.01 deactivation_time_constant=0.04
        minimum_activation=0.01
      PathPoint RSR-Origin-P1: skull (0.0453 0.0546 0.018)
      PathPoint RSL-Pulley-P2: skull (0.0678 0.063 0.032)
      PathPoint RSR-Insertion-P3: r_eye (0.0076 0.0104 0)
      PathWrap: wrap_object=right_eye_wrap method=axial
      ActiveForceLengthCurve: min_norm_active_fiber_length=0.55 transition_norm_fiber_length=0.7
          max_norm_active_fiber_length=1.8 shallow_ascending_slope=2.4 minimum_value=0
      FiberForceLengthCurve: strain_at_zero_force=-0.18 strain_at_one_norm_force=0.4
      TendonForceLengthCurve: strain_at_one_norm_force=1
      Mileusnic06Spindle spindle
      Lin02GolgiTendonOrgan GTO
    Millard12EqMuscleWithAfferents r_Inferior_Rectus: optimal_force=1 max_isometric_force=1.4269
        optimal_fiber_length=0.04549 tendon_slack_length=0.0048 pennation_angle_at_optimal=0
        max_contraction_velocity=4.1437 ignore_tendon_compliance=true fiber_damping=0 default_activation=0
        default_fiber_length=0.0449 activation_time_constant=0.01 deactivation_time_constant=0.04
        minimum_activation=0.01
      PathPoint RIR-Origin-P1: skull (0.0453 0.0486 0.018)
      PathPoint RIL-Pulley-P2: skull (0.0728 0.0382 0.0298)
      PathPoint RIR-Insertion-P3: r_eye (0.00805 -0.0102 0)
      PathWrap: wrap_object=right_eye_wrap method=axial
      ActiveForceLengthCurve: min_norm_active_fiber_length=0.55 transition_norm_fiber_length=0.7
          max_norm_active_fiber_length=1.8 shallow_ascending_slope=2.4 minimum_value=0
      FiberForceLengthCurve: strain_at_zero_force=-0.18 strain_at_one_norm_force=0.4
      TendonForceLengthCurve: strain_at_one_norm_force=1
      Mileusnic06Spindle spindle
      Lin02GolgiTendonOrgan GTO
    Millard12EqMuscleWithAfferents r_Superior_Oblique: optimal_force=1 max_isometric_force=0.6031
        optimal_fiber_length=0.03956 tendon_slack_length=0.0265 pennation_angle_at_optimal=0
        max_contraction_velocity=4.7648 ignore_tendon_compliance=true fiber_damping=0 default_activation=0
        default_fiber_length=0.06137 activation_time_constant=0.01 deactivation_time_constant=0.04
        minimum_activation=0.01
      PathPoint RIR-Origin-P1: skull (0.0461658 0.05214521 0.0175598)
      PathPoint RSO-Pulley-P2: skull (0.0852 0.0632 0.0188)
      PathPoint RSO-Insertion-P3: r_eye (-0.0044 0.011 0.0029)
      PathWrap: wrap_object=right_eye_wrap2 method=axial
      ActiveForceLengthCurve: min_norm_active_fiber_length=0.55 transition_norm_fiber_length=0.7
          max_norm_active_fiber_length=1.8 shallow_ascending_slope=2.4 minimum_value=0
      FiberForceLengthCurve: strain_at_zero_force=-0.18 strain_at_one_norm_force=0.4
      TendonForceLengthCurve: strain_at_one_norm_force=1
      Mileusnic06Spindle spindle
      Lin02GolgiTendonOrgan GTO
    Millard12EqMuscleWithAfferents r_Inferior_Oblique: optimal_force=1 max_isometric_force=0.559
        optimal_fiber_length=0.0411 tendon_slack_length=0.0015 pennation_angle_at_optimal=0
        max_contraction_velocity=4.5863 ignore_tendon_compliance=true fiber_damping=0 default_activation=0
        default_fiber_length=0.03774 activation_time_constant=0.01 deactivation_time_constant=0.04
        minimum_activation=0.01
      PathPoint RIO-Origin-P1: skull (0.0883 0.0356 0.0229)
      PathPoint RIO-Pulley-P2: skull (0.06982 0.0375 0.034)
      PathPoint RIO-Insertion-P3: r_eye (-0.008 0 0.009)
      PathWrap: wrap_object=right_eye_wrap2 method=axial
      ActiveForceLengthCurve: min_norm_active_fiber_length=0.55 transition_norm_fiber_length=0.7
          max_norm_active_fiber_length=1.8 shallow_ascending_slope=2.4 minimum_value=0
      FiberForceLengthCurve: strain_at_zero_force=-0.18 strain_at_one_norm_force=0.4
      TendonForceLengthCurve: strain_at_one_norm_force=1
      Mileusnic06Spindle spindle
      Lin02GolgiTendonOrgan GTO
    SpringGeneralizedForce [values shared by the 6 below unless stated]: stiffness=0.002225 rest_length=0 viscosity=0
    SpringGeneralizedForce r_add_adb_tissue: coordinate=r_eye_add_abd
    SpringGeneralizedForce r_sup_inf_tissue: coordinate=r_eye_sup_inf
    SpringGeneralizedForce r_inc_exc_tissue: coordinate=r_eye_inc_exc
    Millard12EqMuscleWithAfferents l_Lateral_Rectus: optimal_force=1 max_isometric_force=1.471
        optimal_fiber_length=0.04898 tendon_slack_length=0.0084 pennation_angle_at_optimal=0
        max_contraction_velocity=3.8484 ignore_tendon_compliance=true fiber_damping=0 default_activation=0
        default_fiber_length=0.0513 activation_time_constant=0.01 deactivation_time_constant=0.04
        minimum_activation=0.01
      PathPoint LLR-Origin-P1: skull (0.043 0.0516 -0.021)
      PathPoint LRL-Pulley-P2: skull (0.0668 0.0513 -0.046)
      PathPoint LLR-Insertion-P3: l_eye (0.0065 0 -0.0101)
      PathWrap: wrap_object=left_eye_wrap method=axial
      ActiveForceLengthCurve: min_norm_active_fiber_length=0.55 transition_norm_fiber_length=0.7
          max_norm_active_fiber_length=1.8 shallow_ascending_slope=2.4 minimum_value=0
      FiberForceLengthCurve: strain_at_zero_force=-0.18 strain_at_one_norm_force=0.4
      TendonForceLengthCurve: strain_at_one_norm_force=1
      Mileusnic06Spindle spindle
      Lin02GolgiTendonOrgan GTO
    Millard12EqMuscleWithAfferents l_Medial_Rectus: optimal_force=1 max_isometric_force=1.574
        optimal_fiber_length=0.04084 tendon_slack_length=0.0038 pennation_angle_at_optimal=0
        max_contraction_velocity=4.6155 ignore_tendon_compliance=true fiber_damping=0 default_activation=0
        default_fiber_length=0.0398 activation_time_constant=0.01 deactivation_time_constant=0.04
        minimum_activation=0.01
      PathPoint LMR-Origin-P1: skull (0.047 0.0516 -0.017)
      PathPoint LML-Pulley-P2: skull (0.0717 0.05114 -0.0194)
      PathPoint LMR-Insertion-P3: l_eye (0.0088 0 0.0096)
      PathWrap: wrap_object=left_eye_wrap method=axial
      ActiveForceLengthCurve: min_norm_active_fiber_length=0.55 transition_norm_fiber_length=0.7
          max_norm_active_fiber_length=1.8 shallow_ascending_slope=2.4 minimum_value=0
      FiberForceLengthCurve: strain_at_zero_force=-0.18 strain_at_one_norm_force=0.4
      TendonForceLengthCurve: strain_at_one_norm_force=1
      Mileusnic06Spindle spindle
      Lin02GolgiTendonOrgan GTO
    Millard12EqMuscleWithAfferents l_Superior_Rectus: optimal_force=1 max_isometric_force=1.1768
        optimal_fiber_length=0.04487 tendon_slack_length=0.0054 pennation_angle_at_optimal=0
        max_contraction_velocity=4.2009 ignore_tendon_compliance=true fiber_damping=0 default_activation=0
        default_fiber_length=0.04495 activation_time_constant=0.01 deactivation_time_constant=0.04
        minimum_activation=0.01
      PathPoint LSR-Origin-P1: skull (0.0453 0.0546 -0.018)
      PathPoint LSL-Pulley-P2: skull (0.0678 0.063 -0.032)
      PathPoint LSR-Insertion-P3: l_eye (0.0076 0.0104 0)
      PathWrap: wrap_object=left_eye_wrap method=axial
      ActiveForceLengthCurve: min_norm_active_fiber_length=0.55 transition_norm_fiber_length=0.7
          max_norm_active_fiber_length=1.8 shallow_ascending_slope=2.4 minimum_value=0
      FiberForceLengthCurve: strain_at_zero_force=-0.18 strain_at_one_norm_force=0.4
      TendonForceLengthCurve: strain_at_one_norm_force=1
      Mileusnic06Spindle spindle
      Lin02GolgiTendonOrgan GTO
    Millard12EqMuscleWithAfferents l_Inferior_Rectus: optimal_force=1 max_isometric_force=1.4269
        optimal_fiber_length=0.04549 tendon_slack_length=0.0048 pennation_angle_at_optimal=0
        max_contraction_velocity=4.1437 ignore_tendon_compliance=true fiber_damping=0 default_activation=0
        default_fiber_length=0.0449 activation_time_constant=0.01 deactivation_time_constant=0.04
        minimum_activation=0.01
      PathPoint LIR-Origin-P1: skull (0.0453 0.0486 -0.018)
      PathPoint LIL-Pulley-P2: skull (0.0728 0.0382 -0.0298)
      PathPoint LIR-Insertion-P3: l_eye (0.00805 -0.0102 0)
      PathWrap: wrap_object=left_eye_wrap method=axial
      ActiveForceLengthCurve: min_norm_active_fiber_length=0.55 transition_norm_fiber_length=0.7
          max_norm_active_fiber_length=1.8 shallow_ascending_slope=2.4 minimum_value=0
      FiberForceLengthCurve: strain_at_zero_force=-0.18 strain_at_one_norm_force=0.4
      TendonForceLengthCurve: strain_at_one_norm_force=1
      Mileusnic06Spindle spindle
      Lin02GolgiTendonOrgan GTO
    Millard12EqMuscleWithAfferents l_Superior_Oblique: optimal_force=1 max_isometric_force=0.6031
        optimal_fiber_length=0.03956 tendon_slack_length=0.0265 pennation_angle_at_optimal=0
        max_contraction_velocity=4.7648 ignore_tendon_compliance=true fiber_damping=0 default_activation=0
        default_fiber_length=0.06137 activation_time_constant=0.01 deactivation_time_constant=0.04
        minimum_activation=0.01
      PathPoint LIR-Origin-P1: skull (0.0461658 0.05214521 -0.0175598)
      PathPoint LSO-Pulley-P2: skull (0.0852 0.0632 -0.0188)
      PathPoint LSO-Insertion-P3: l_eye (-0.0044 0.011 -0.0029)
      PathWrap: wrap_object=left_eye_wrap2 method=axial
      ActiveForceLengthCurve: min_norm_active_fiber_length=0.55 transition_norm_fiber_length=0.7
          max_norm_active_fiber_length=1.8 shallow_ascending_slope=2.4 minimum_value=0
      FiberForceLengthCurve: strain_at_zero_force=-0.18 strain_at_one_norm_force=0.4
      TendonForceLengthCurve: strain_at_one_norm_force=1
      Mileusnic06Spindle spindle
      Lin02GolgiTendonOrgan GTO
    Millard12EqMuscleWithAfferents l_Inferior_Oblique: optimal_force=1 max_isometric_force=0.559
        optimal_fiber_length=0.0411 tendon_slack_length=0.0015 pennation_angle_at_optimal=0
        max_contraction_velocity=4.5863 ignore_tendon_compliance=true fiber_damping=0 default_activation=0
        default_fiber_length=0.03774 activation_time_constant=0.01 deactivation_time_constant=0.04
        minimum_activation=0.01
      PathPoint LIO-Origin-P1: skull (0.0883 0.0356 -0.0229)
      PathPoint LIO-Pulley-P2: skull (0.06982 0.0375 -0.034)
      PathPoint LIO-Insertion-P3: l_eye (-0.008 0 -0.009)
      PathWrap: wrap_object=left_eye_wrap2 method=axial
      ActiveForceLengthCurve: min_norm_active_fiber_length=0.55 transition_norm_fiber_length=0.7
          max_norm_active_fiber_length=1.8 shallow_ascending_slope=2.4 minimum_value=0
      FiberForceLengthCurve: strain_at_zero_force=-0.18 strain_at_one_norm_force=0.4
      TendonForceLengthCurve: strain_at_one_norm_force=1
      Mileusnic06Spindle spindle
      Lin02GolgiTendonOrgan GTO
    SpringGeneralizedForce l_add_adb_tissue: coordinate=l_eye_add_abd
    SpringGeneralizedForce l_sup_inf_tissue: coordinate=l_eye_sup_inf
    SpringGeneralizedForce l_inc_exc_tissue: coordinate=l_eye_inc_exc
    CoordinateLimitForce [values shared by the 6 below unless stated]: upper_stiffness=250 [N*m/degree]
        lower_stiffness=250 [N*m/degree] damping=25
    CoordinateLimitForce pitch1_physical_limit: coordinate=pitch1 upper_stiffness=200 upper_limit=0.314159 [degrees]
        lower_stiffness=200 lower_limit=-0.20944 [degrees] damping=20 transition=0.087266 [degrees]
    CoordinateLimitForce pitch2_physical_limit: coordinate=pitch2 upper_limit=0.628319 lower_limit=-0.431969
        transition=0.174533
    CoordinateLimitForce roll1_physical_limit: coordinate=roll1 upper_limit=0.07854 lower_limit=-0.07854
        transition=0.02618
    CoordinateLimitForce roll2_physical_limit: coordinate=roll2 upper_limit=0.431969 lower_limit=-0.431969
        transition=0.14399
    CoordinateLimitForce yaw1_physical_limit: coordinate=yaw1 upper_limit=0.497419 lower_limit=-0.497419
        transition=0.165806
    CoordinateLimitForce yaw2_physical_limit: coordinate=yaw2 upper_limit=0.353429 lower_limit=-0.353429
        transition=0.11781
    ObjectGroup hyoid: members=(Sterno_hyoid Omo_hyoid SternoThyroid digastric_post digastric_ant Geniohyoid Mylohyoid_Post Mylohyoid_Ant Stylohyoid_Lat Stylohyoid_Med Sterno_hyoid_L Omo_hyoid_L SternoThyroid_L digastric_post_L digastric_ant_L Geniohyoid_L Mylohyoid_Post_L Mylohyoid_Ant_L Stylohyoid_Lat_L Stylohyoid_Med_L)
    ObjectGroup sterno: members=(cleid_mast cleid_occ stern_mast cleid_mast_L cleid_occ_L stern_mast_L)
    ObjectGroup flexion: members=(cleid_mast cleid_occ long_cap_sklc4 long_col_c1c5 long_col_c1thx long_col_c5thx scalenus_ant stern_mast cleid_mast_L cleid_occ_L long_cap_sklc4_L long_col_c1c5_L long_col_c1thx_L long_col_c5thx_L scalenus_ant_L stern_mast_L)
    ObjectGroup rotation_contra: members=(cleid_mast cleid_occ long_cap_sklc4 long_col_c1c5 obl_cap_sup semi_cap_sklc5 semi_cap_sklthx semi_cerv_c3thx stern_mast trap_acr trap_cl)
    ObjectGroup lat_bending: members=(cleid_mast cleid_occ iliocost_cerv_c5rib levator_scap long_cap_sklc4 long_col_c1c5 long_col_c1thx long_col_c5thx longissi_cap_sklc6 longissi_cerv_c4thx obl_cap_inf obl_cap_sup rectcap_post_maj scalenus_ant scalenus_med scalenus_post semi_cap_sklc5 semi_cap_sklthx semi_cerv_c3thx splen_cap_sklc6 splen_cap_sklthx splen_cerv_c3thx stern_mast trap_acr trap_cl)
    ObjectGroup scalenus: members=(scalenus_ant scalenus_med scalenus_post)
    ObjectGroup extension: members=(iliocost_cerv_c5rib levator_scap longissi_cap_sklc6 longissi_cerv_c4thx obl_cap_inf obl_cap_sup rectcap_post_maj rectcap_post_min scalenus_med scalenus_post semi_cap_sklc5 semi_cap_sklthx semi_cerv_c3thx splen_cap_sklc6 splen_cap_sklthx splen_cerv_c3thx trap_acr trap_cl)
    ObjectGroup rotation_ipsi: members=(iliocost_cerv_c5rib levator_scap long_col_c5thx longissi_cap_sklc6 longissi_cerv_c4thx obl_cap_inf rectcap_post_maj scalenus_med scalenus_post splen_cap_sklc6 splen_cap_sklthx splen_cerv_c3thx)
    ObjectGroup longus: members=(long_cap_sklc4 long_col_c1c5 long_col_c1thx long_col_c5thx)
    ObjectGroup trapezius: members=(trap_acr trap_cl)
    ObjectGroup splenius: members=(splen_cap_sklc6 splen_cap_sklthx splen_cerv_c3thx)
    ObjectGroup semispinalis: members=(semi_cap_sklc5 semi_cap_sklthx semi_cerv_c3thx)
    ObjectGroup levator_scap: members=levator_scap
    ObjectGroup erectorspinae: members=(iliocost_cerv_c5rib longissi_cap_sklc6 longissi_cerv_c4thx)
    ObjectGroup suboccipital: members=(obl_cap_inf obl_cap_sup rectcap_post_maj rectcap_post_min)
    ObjectGroup multifidus
  MarkerSet:
    Marker SJN: ribcage (0.02 0.351569 0)
    Marker RAH: skull (0.1 0.1 0.05)
    Marker LAH: skull (0.1 0.1 -0.06)
    Marker RPH: skull (-0.09 0.1 0.045)
    Marker LPH: skull (-0.09 0.1 -0.045)
    Marker RCAJ: rscapula (0 0.01 0.02)
    Marker LCAJ: lscapula (0 0.01 -0.02)
    Marker r_eye_marker: r_eye (2 0 0)
    Marker l_eye_marker: l_eye (2 0 0)
    Marker Right_Vestibular: skull (0.01 0.035 0.045)
    Marker Left_Vestibular: skull (0.01 0.035 -0.045)
