# OpenSim document version 40600
Model:
  Ground
  BodySet:
    Body block: mass=1 [kg] mass_center=(0 0 0) inertia=(1 1 1 0 0 0)
  JointSet:
    SliderJoint slider: socket_parent_frame=ground_offset socket_child_frame=block_offset
      Coordinate x_translation
      PhysicalOffsetFrame ground_offset: socket_parent=/ground translation=(0 0 0) [meters]
      PhysicalOffsetFrame block_offset: socket_parent=/bodyset/block translation=(0 0 0)
  ControllerSet:
    SpindleController spindle_controller: socket_actuators=/forceset/muscle
      ControlFunctions:
        FunctionSet: Constant(value=0.01)
      SpindleFunctionsStatic:
        FunctionSet: Constant(value=0)
      SpindleFunctionsDynamic:
        FunctionSet: Constant(value=70)
  ForceSet:
    Millard12EqMuscleWithSimplifiedAfferent muscle: min_control=0.01 max_control=1 max_isometric_force=1000
        optimal_fiber_length=0.04545 tendon_slack_length=0.001 pennation_angle_at_optimal=0 [radians]
        ignore_tendon_compliance=true
      PathPoint origin: ground (0 0 0)
      PathPoint insertion: block (0 0 0)
      ActiveForceLengthCurve: minimum_value=0
      ForceVelocityCurve: concentric_slope_at_vmax=0 concentric_slope_near_vmax=0.25 isometric_slope=5
          eccentric_slope_at_vmax=0 eccentric_slope_near_vmax=0.15 max_eccentric_velocity_force_multiplier=1.4
      FiberForceLengthCurve
      TendonForceLengthCurve
