# OpenSim document version 40600
Model:
  Ground
  ForceSet:
    Millard12EqMuscleWithAfferents muscle: min_control=0.01 max_control=1 max_isometric_force=1000
        optimal_fiber_length=0.1 tendon_slack_length=0.05 pennation_angle_at_optimal=0 [radians]
      PathPoint origin: ground (0 0 0)
      PathPoint insertion: ground (1 0 0)
      ActiveForceLengthCurve: minimum_value=0
      ForceVelocityCurve: concentric_slope_at_vmax=0 concentric_slope_near_vmax=0.25 isometric_slope=5
          eccentric_slope_at_vmax=0 eccentric_slope_near_vmax=0.15 max_eccentric_velocity_force_multiplier=1.4
      FiberForceLengthCurve
      TendonForceLengthCurve
